OpenVSP model (file version 5), 1 components.
Geometry view with OpenVSP parameter names; values to 6 digits, angles in degrees, lengths in the model's unit.
Overall bounding box: X_Min=-0.000119224 X_Len=2.73579 Y_Min=-9 Y_Len=18 Z_Min=-0.0582214 Z_Len=0.370137

Wing "Wing"
  location (X Y Z) 0 0 0, rotation 0 0 0
  symmetric about XZ
  bounding box size 2.73579 18 0.370137
  totals: TotalSpan=18 TotalProjectedSpan=18 TotalChord=2.53 TotalArea=45.54 TotalAR=7.11462
  root: chord 2.56, twist 0, airfoil file "FX 63-137 13.7% smoothed"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 BaseThickChord=0.136698 ThickChord=0.136698
  sections:
    n  Span  Root_Chord  Tip_Chord  Area   Sweep  Sweep_Location  Dihedral  Twist  Twist_Location  tip airfoil
    1  9     2.56        2.5        22.77  1.5    0               0         0      0.25            airfoil file "FX 63-137 13.7% smoothed"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 BaseThickChord=0.136698 ThickChord=0.1367
